<?xml version="1.0" encoding="ISO-8859-1"?>
<neuroml xmlns="http://www.neuroml.org/schema/neuroml2" xmlns:xsi="http://www.w3.org/2001/XMLSchema-instance" xsi:schemaLocation="http://www.neuroml.org/schema/neuroml2 https://raw.github.com/NeuroML/NeuroML2/development/Schemas/NeuroML2/NeuroML_v2beta4.xsd" id="NeuroML_ionChannel">

    <ionChannel id="Im" conductance="10pS" type="ionChannelHH" species="k">

        <gate id="m" type="gateHHrates" instances="1">
            <q10Settings type="q10Fixed" fixedQ10="2.95288264141"/>
            <forwardRate type="HHExpRate" rate="0.0033per_ms" scale="10mV" midpoint="-35mV"/>
            <reverseRate type="HHExpRate" rate="0.0033per_ms" scale="-10mV" midpoint="-35mV"/>
        </gate>

    </ionChannel>

</neuroml>
