<?xml version="1.0" encoding="ISO-8859-1"?>
<neuroml xmlns="http://www.neuroml.org/schema/neuroml2" xmlns:xsi="http://www.w3.org/2001/XMLSchema-instance" xsi:schemaLocation="http://www.neuroml.org/schema/neuroml2 https://raw.github.com/NeuroML/NeuroML2/development/Schemas/NeuroML2/NeuroML_v2beta4.xsd" id="NeuroML_ionChannel">

    <ionChannel id="NaTs2_t" conductance="10pS" type="ionChannelHH" species="na">

        <gate id="m" type="gateHHrates" instances="3">
            <q10Settings type="q10Fixed" fixedQ10="2.95288264141"/>
            <forwardRate type="HHExpLinearRate" rate="1.092per_ms" scale="6mV" midpoint="-32mV"/>
            <reverseRate type="HHExpLinearRate" rate="0.744per_ms" scale="-6mV" midpoint="-32mV"/>

        </gate>

        <gate id="h" type="gateHHrates" instances="1">
            <q10Settings type="q10Fixed" fixedQ10="2.95288264141"/>
            <forwardRate type="HHExpLinearRate" rate="0.09per_ms" scale="-6mV" midpoint="-60mV"/>
            <reverseRate type="HHExpLinearRate" rate="0.09per_ms" scale="6mV" midpoint="-60mV"/>

        </gate>

    </ionChannel>

</neuroml>
