<?xml version='1.0' encoding='UTF-8'?>
<neuroml xmlns="http://www.neuroml.org/schema/neuroml2" xmlns:xsi="http://www.w3.org/2001/XMLSchema-instance" xsi:schemaLocation="http://www.neuroml.org/schema/neuroml2 https://raw.github.com/NeuroML/NeuroML2/development/Schemas/NeuroML2/NeuroML_v2.3.xsd" id="NeuroML2_file_exported_from_NEURON">

  <notes> NeuroML 2 file generated from ModelView by: NEURON -- VERSION 8.2.6+ HEAD (078a34a9d+) 2024-07-24
          Authors: Michael Hines, Sushil Kambampati and Padraig Gleeson,
          Yale University and UCL
  </notes>

  <include href="K_Tst.nml" />
  <include href="SKv3_1.nml" />
  <include href="Nap_Et2.nml" />
  <include href="NaTs2_t.nml" />
  <include href="Ih.nml" />
  <include href="pas.nml" />
  <include href="Im.nml" />
  <include href="NaTa_t.nml" />
  <include href="Ca_LVAst.nml" />
  <include href="SK_E2.nml" />
  <include href="K_Pst.nml" />
  <include href="CaDynamics_E2.nml" />
  <include href="Ca.nml" />

  <cell id="L1_DAC_cNAC187_1_cell_0_0">
    <notes>Cell: L1_DAC_cNAC187_1_cell_0_0 exported from NEURON ModelView</notes>
    <morphology id="morphology">

      <segment id="0" name="Seg0_soma">
        <proximal x="-6.84019" y="-2.17038" z="0" diameter="3.08762" />
        <distal x="-6.15617" y="-1.95334" z="0" diameter="5.50494" />
      </segment>
      <segment id="2" name="Seg1_soma">
        <parent segment="0" />
        <distal x="-5.47215" y="-1.7363" z="0" diameter="7.586" />
      </segment>
      <segment id="3" name="Seg2_soma">
        <parent segment="2" />
        <distal x="-4.78813" y="-1.51927" z="0" diameter="9.07928" />
      </segment>
      <segment id="4" name="Seg3_soma">
        <parent segment="3" />
        <distal x="-4.10411" y="-1.30223" z="0" diameter="9.80903" />
      </segment>
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
      <segmentGroup id="soma" neuroLexId="sao864921383">
         <property tag="numberInternalDivisions" value="1" /><notes>This group contains an unbranched set of segments, and all of the segmentGroups marked with
             neuroLexId = sao864921383 form a non-overlapping set of all of the segments.
             These segmentGroups correspond to the 'cables' of NeuroML v1.8.1, and map to/from NEURON sections.</notes>
        <member segment="0" />
        <member segment="2" />
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      </segmentGroup>

      <segmentGroup id="dend_4" neuroLexId="sao864921383">
         <property tag="numberInternalDivisions" value="1" /><notes>This group contains an unbranched set of segments, and all of the segmentGroups marked with
             neuroLexId = sao864921383 form a non-overlapping set of all of the segments.
             These segmentGroups correspond to the 'cables' of NeuroML v1.8.1, and map to/from NEURON sections.</notes>
        <member segment="193" />
        <member segment="194" />
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      </segmentGroup>

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
      <segmentGroup id="all">
        <include segmentGroup="soma" />
        <include segmentGroup="dend_4" />
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      </segmentGroup>

     <segmentGroup id="basal">
               <include segmentGroup="soma" />
        <include segmentGroup="dend_4" />
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        <inhomogeneousParameter id="PathLengthOver_basal" variable="p" metric="Path Length from root">
          <proximal translationStart="0.000000e+00" />
        </inhomogeneousParameter>
      </segmentGroup>

      <segmentGroup id="apical">
        <inhomogeneousParameter id="PathLengthOver_apical" variable="p" metric="Path Length from root">
          <proximal translationStart="0.000000e+00" />
        </inhomogeneousParameter>
      </segmentGroup>

      <segmentGroup id="axonal">
        <include segmentGroup="axon_0" />
        <include segmentGroup="axon_1" />
      </segmentGroup>

      <segmentGroup id="somatic">
        <include segmentGroup="soma" />
      </segmentGroup>
    </morphology>
    <biophysicalProperties id="biophys">
            <membraneProperties>
                <channelDensity id="basal_gK_Tstbar_K_Tst" segmentGroup="basal" ion="k" ionChannel="K_Tst" erev="-85.0 mV" condDensity="0.009500 S_per_cm2" />
                <channelDensity id="basal_gSKv3_1bar_SKv3_1" segmentGroup="basal" ion="k" ionChannel="SKv3_1" erev="-85.0 mV" condDensity="0.004399 S_per_cm2" />
                <channelDensity id="basal_gNap_Et2bar_Nap_Et2" segmentGroup="basal" ion="na" ionChannel="Nap_Et2" erev="50.0 mV" condDensity="0.000001 S_per_cm2" />
                <channelDensity id="basal_gNaTs2_tbar_NaTs2_t" segmentGroup="basal" ion="na" ionChannel="NaTs2_t" erev="50.0 mV" condDensity="0.000010 S_per_cm2" />
                <channelDensity id="basal_g_pas" segmentGroup="basal" ion="non_specific" ionChannel="pas" erev="-79.315740 mV" condDensity="0.000001 S_per_cm2" />
                <channelDensity id="basal_gImbar_Im" segmentGroup="basal" ion="k" ionChannel="Im" erev="-85.0 mV" condDensity="0.000008 S_per_cm2" />
                <channelDensity id="apical_gK_Tstbar_K_Tst" segmentGroup="apical" ion="k" ionChannel="K_Tst" erev="-85.0 mV" condDensity="0.009500 S_per_cm2" />
                <channelDensity id="apical_gSKv3_1bar_SKv3_1" segmentGroup="apical" ion="k" ionChannel="SKv3_1" erev="-85.0 mV" condDensity="0.004399 S_per_cm2" />
                <channelDensity id="apical_gNap_Et2bar_Nap_Et2" segmentGroup="apical" ion="na" ionChannel="Nap_Et2" erev="50.0 mV" condDensity="0.000001 S_per_cm2" />
                <channelDensity id="apical_gNaTs2_tbar_NaTs2_t" segmentGroup="apical" ion="na" ionChannel="NaTs2_t" erev="50.0 mV" condDensity="0.000010 S_per_cm2" />
                <channelDensity id="apical_g_pas" segmentGroup="apical" ion="non_specific" ionChannel="pas" erev="-79.315740 mV" condDensity="1e-06 S_per_cm2" />
                <channelDensity id="apical_gImbar_Im" segmentGroup="apical" ion="k" ionChannel="Im" erev="-85.0 mV" condDensity="0.000008 S_per_cm2" />
                <channelDensity id="axonal_gNaTa_tbar_NaTa_t" segmentGroup="axonal" ion="na" ionChannel="NaTa_t" erev="50.0 mV" condDensity="3.959764 S_per_cm2" />
                <channelDensity id="axonal_gK_Tstbar_K_Tst" segmentGroup="axonal" ion="k" ionChannel="K_Tst" erev="-85.0 mV" condDensity="0.098908 S_per_cm2" />
                <channelDensity id="axonal_gNap_Et2bar_Nap_Et2" segmentGroup="axonal" ion="na" ionChannel="Nap_Et2" erev="50.0 mV" condDensity="0 S_per_cm2" />
                <channelDensity id="axonal_gSK_E2bar_SK_E2" segmentGroup="axonal" ion="k" ionChannel="SK_E2" erev="-85.0 mV" condDensity="0.003442 S_per_cm2" />
                <channelDensity id="axonal_gK_Pstbar_K_Pst" segmentGroup="axonal" ion="k" ionChannel="K_Pst" erev="-85.0 mV" condDensity="0.004729 S_per_cm2" />
                <channelDensity id="axonal_gSKv3_1bar_SKv3_1" segmentGroup="axonal" ion="k" ionChannel="SKv3_1" erev="-85.0 mV" condDensity="0.317363 S_per_cm2" />
                <channelDensity id="axonal_g_pas" segmentGroup="axonal" ion="non_specific" ionChannel="pas" erev="-60.216510 mV" condDensity="0.000094 S_per_cm2" />
                <channelDensity id="axonal_gImbar_Im" segmentGroup="axonal" ion="k" ionChannel="Im" erev="-85.0 mV" condDensity="0.000999 S_per_cm2" />
                <channelDensity id="somatic_gK_Tstbar_K_Tst" segmentGroup="somatic" ion="k" ionChannel="K_Tst" erev="-85.0 mV" condDensity="0.092965 S_per_cm2" />
                <channelDensity id="somatic_gNap_Et2bar_Nap_Et2" segmentGroup="somatic" ion="na" ionChannel="Nap_Et2" erev="50.0 mV" condDensity="0.000001 S_per_cm2" />
                <channelDensity id="somatic_gSK_E2bar_SK_E2" segmentGroup="somatic" ion="k" ionChannel="SK_E2" erev="-85.0 mV" condDensity="0.019726 S_per_cm2" />
                <channelDensity id="somatic_gK_Pstbar_K_Pst" segmentGroup="somatic" ion="k" ionChannel="K_Pst" erev="-85.0 mV" condDensity="0.156376 S_per_cm2" />
                <channelDensity id="somatic_gSKv3_1bar_SKv3_1" segmentGroup="somatic" ion="k" ionChannel="SKv3_1" erev="-85.0 mV" condDensity="0.297559 S_per_cm2" />
                <channelDensity id="somatic_g_pas" segmentGroup="somatic" ion="non_specific" ionChannel="pas" erev="-62.442793 mV" condDensity="0.000091 S_per_cm2" />
                <channelDensity id="somatic_gImbar_Im" segmentGroup="somatic" ion="k" ionChannel="Im" erev="-85.0 mV" condDensity="0.000008 S_per_cm2" />
                <channelDensity id="somatic_gNaTs2_tbar_NaTs2_t" segmentGroup="somatic" ion="na" ionChannel="NaTs2_t" erev="50.0 mV" condDensity="0.197999 S_per_cm2" />
                <channelDensityNernst id="axonal_gCa_LVAstbar_Ca_LVAst" ionChannel="Ca_LVAst" condDensity="0.000015 S_per_cm2" segmentGroup="axonal" ion="ca" />
                <channelDensityNernst id="axonal_gCabar_Ca" ionChannel="Ca" condDensity="0.000003 S_per_cm2" segmentGroup="axonal" ion="ca" />
                <channelDensityNernst id="somatic_gCa_LVAstbar_Ca_LVAst" ionChannel="Ca_LVAst" condDensity="0.001067 S_per_cm2" segmentGroup="somatic" ion="ca" />
                <channelDensityNernst id="somatic_gCabar_Ca" ionChannel="Ca" condDensity="0.000032 S_per_cm2" segmentGroup="somatic" ion="ca" />
                <channelDensityNonUniform id="basal_gIhbar_Ih" ionChannel="Ih" erev="-45.0 mV" ion="hcn">
                    <variableParameter segmentGroup="basal" parameter="condDensity">
                        <inhomogeneousValue value="1e4 * ((-0.869600 + 2.087000*exp((p-0.000000)*0.003000))*0.000052)" inhomogeneousParameter="PathLengthOver_basal" />
                    </variableParameter>
                </channelDensityNonUniform>
                <channelDensityNonUniform id="apical_gIhbar_Ih" ionChannel="Ih" erev="-45.0 mV" ion="hcn">
                    <variableParameter segmentGroup="apical" parameter="condDensity">
                        <inhomogeneousValue value="1e4 * ((-0.869600 + 2.087000*exp((p-0.000000)*0.003000))*0.000052)" inhomogeneousParameter="PathLengthOver_apical" />
                    </variableParameter>
                </channelDensityNonUniform>
                <spikeThresh value="10mV" />
                <specificCapacitance value="1.0 uF_per_cm2" />
                <initMembPotential segmentGroup="all" value="-80 mV" />
            </membraneProperties>
            <intracellularProperties>
                <species segmentGroup="axonal" ion="ca" initialExtConcentration="2.0E-6 mol_per_cm3" concentrationModel="CaDynamics_E2__cNAC_1_axonal" id="ca" initialConcentration="5.0E-11 mol_per_cm3" />
                <species segmentGroup="somatic" ion="ca" initialExtConcentration="2.0E-6 mol_per_cm3" concentrationModel="CaDynamics_E2__cNAC_1_somatic" id="ca" initialConcentration="5.0E-11 mol_per_cm3" />
                <resistivity value="100 ohm_cm" />
            </intracellularProperties>
        </biophysicalProperties>
    </cell>
</neuroml>
