<neuroml xmlns="http://www.neuroml.org/schema/neuroml2"  xmlns:xs="http://www.w3.org/2001/XMLSchema" xmlns:xsi="http://www.w3.org/2001/XMLSchema-instance" xsi:schemaLocation="http://www.neuroml.org/schema/neuroml2 https://raw.github.com/NeuroML/NeuroML2/development/Schemas/NeuroML2/NeuroML_v2.3.1.xsd" id="NeuroML2_file_exported_from_NEURON">
    <notes> NeuroML 2 file generated from ModelView by: NEURON -- VERSION 8.2.6+ HEAD (078a34a9d+) 2024-07-24
          Authors: Michael Hines, Sushil Kambampati and Padraig Gleeson,
          Yale University and UCL
  </notes>
    <include href="K_Tst.nml"/>
    <include href="SKv3_1.nml"/>
    <include href="Nap_Et2.nml"/>
    <include href="NaTs2_t.nml"/>
    <include href="Ih.nml"/>
    <include href="pas.nml"/>
    <include href="Im.nml"/>
    <include href="NaTa_t.nml"/>
    <include href="Ca_LVAst.nml"/>
    <include href="SK_E2.nml"/>
    <include href="K_Pst.nml"/>
    <include href="CaDynamics_E2.nml"/>
    <include href="Ca.nml"/>
    <cell id="L1_DLAC_cNAC187_1_cell_0_0">
        <notes>Cell: L1_DLAC_cNAC187_1_cell_0_0 exported from NEURON ModelView</notes>
        <morphology id="morphology">
            <segment id="0" name="Seg0_soma">
                <proximal x="4.6633" y="-5.2437" z="0.0" diameter="2.85845"/>
                <distal x="4.19697" y="-4.71933" z="0.0" diameter="5.08473"/>
            </segment>
            <segment id="2" name="Seg1_soma">
                <parent segment="0"/>
                <distal x="3.73064" y="-4.19496" z="0.0" diameter="7.56988"/>
            </segment>
            <segment id="3" name="Seg2_soma">
                <parent segment="2"/>
                <distal x="3.26431" y="-3.67059" z="0.0" diameter="8.83361"/>
            </segment>
            <segment id="4" name="Seg3_soma">
                <parent segment="3"/>
                <distal x="2.79798" y="-3.14622" z="0.0" diameter="9.78072"/>
            </segment>
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            <segmentGroup id="soma" neuroLexId="sao864921383">
                <notes>This group contains an unbranched set of segments, and all of the segmentGroups marked with
             neuroLexId = sao864921383 form a non-overlapping set of all of the segments.
             These segmentGroups correspond to the 'cables' of NeuroML v1.8.1, and map to/from NEURON sections.</notes>
                <property tag="numberInternalDivisions" value="1"/>
                <member segment="0"/>
                <member segment="2"/>
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            </segmentGroup>
            <segmentGroup id="dend_47" neuroLexId="sao864921383">
                <notes>This group contains an unbranched set of segments, and all of the segmentGroups marked with
             neuroLexId = sao864921383 form a non-overlapping set of all of the segments.
             These segmentGroups correspond to the 'cables' of NeuroML v1.8.1, and map to/from NEURON sections.</notes>
                <property tag="numberInternalDivisions" value="1"/>
                <member segment="1240"/>
                <member segment="1241"/>
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            </segmentGroup>
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            <segmentGroup id="basal">
                <include segmentGroup="soma"/>
                <include segmentGroup="dend_47"/>
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                <inhomogeneousParameter id="PathLengthOver_basal" variable="p" metric="Path Length from root">
                    <proximal translationStart="0.0"/>
                </inhomogeneousParameter>
            </segmentGroup>
            <segmentGroup id="apical">
                <inhomogeneousParameter id="PathLengthOver_apical" variable="p" metric="Path Length from root">
                    <proximal translationStart="0.0"/>
                </inhomogeneousParameter>
            </segmentGroup>
            <segmentGroup id="axonal">
                <include segmentGroup="axon_0"/>
                <include segmentGroup="axon_1"/>
            </segmentGroup>
            <segmentGroup id="somatic">
                <include segmentGroup="soma"/>
            </segmentGroup>
        </morphology>
        <biophysicalProperties id="biophys">
            <membraneProperties>
                <channelDensity id="basal_gK_Tstbar_K_Tst" ionChannel="K_Tst" condDensity="0.009500 S_per_cm2" erev="-85.0 mV" segmentGroup="basal" ion="k"/>
                <channelDensity id="basal_gSKv3_1bar_SKv3_1" ionChannel="SKv3_1" condDensity="0.004399 S_per_cm2" erev="-85.0 mV" segmentGroup="basal" ion="k"/>
                <channelDensity id="basal_gNap_Et2bar_Nap_Et2" ionChannel="Nap_Et2" condDensity="0.000001 S_per_cm2" erev="50.0 mV" segmentGroup="basal" ion="na"/>
                <channelDensity id="basal_gNaTs2_tbar_NaTs2_t" ionChannel="NaTs2_t" condDensity="0.000010 S_per_cm2" erev="50.0 mV" segmentGroup="basal" ion="na"/>
                <channelDensity id="basal_g_pas" ionChannel="pas" condDensity="1e-06 S_per_cm2" erev="-79.315740 mV" segmentGroup="basal" ion="non_specific"/>
                <channelDensity id="basal_gImbar_Im" ionChannel="Im" condDensity="2.2e-05 S_per_cm2" erev="-85.0 mV" segmentGroup="basal" ion="k"/>
                <channelDensity id="apical_gK_Tstbar_K_Tst" ionChannel="K_Tst" condDensity="0.009500 S_per_cm2" erev="-85.0 mV" segmentGroup="apical" ion="k"/>
                <channelDensity id="apical_gSKv3_1bar_SKv3_1" ionChannel="SKv3_1" condDensity="0.004399 S_per_cm2" erev="-85.0 mV" segmentGroup="apical" ion="k"/>
                <channelDensity id="apical_gNap_Et2bar_Nap_Et2" ionChannel="Nap_Et2" condDensity="0.000001 S_per_cm2" erev="50.0 mV" segmentGroup="apical" ion="na"/>
                <channelDensity id="apical_gNaTs2_tbar_NaTs2_t" ionChannel="NaTs2_t" condDensity="0.000010 S_per_cm2" erev="50.0 mV" segmentGroup="apical" ion="na"/>
                <channelDensity id="apical_g_pas" ionChannel="pas" condDensity="1e-06 S_per_cm2" erev="-79.315740 mV" segmentGroup="apical" ion="non_specific"/>
                <channelDensity id="apical_gImbar_Im" ionChannel="Im" condDensity="0.000008 S_per_cm2" erev="-85.0 mV" segmentGroup="apical" ion="k"/>
                <channelDensity id="axonal_gNaTa_tbar_NaTa_t" ionChannel="NaTa_t" condDensity="3.959764 S_per_cm2" erev="50.0 mV" segmentGroup="axonal" ion="na"/>
                <channelDensity id="axonal_gK_Tstbar_K_Tst" ionChannel="K_Tst" condDensity="0.098908 S_per_cm2" erev="-85.0 mV" segmentGroup="axonal" ion="k"/>
                <channelDensity id="axonal_gNap_Et2bar_Nap_Et2" ionChannel="Nap_Et2" condDensity="0 S_per_cm2" erev="50.0 mV" segmentGroup="axonal" ion="na"/>
                <channelDensity id="axonal_gSK_E2bar_SK_E2" ionChannel="SK_E2" condDensity="0.003442 S_per_cm2" erev="-85.0 mV" segmentGroup="axonal" ion="k"/>
                <channelDensity id="axonal_gK_Pstbar_K_Pst" ionChannel="K_Pst" condDensity="0.004729 S_per_cm2" erev="-85.0 mV" segmentGroup="axonal" ion="k"/>
                <channelDensity id="axonal_gSKv3_1bar_SKv3_1" ionChannel="SKv3_1" condDensity="0.317363 S_per_cm2" erev="-85.0 mV" segmentGroup="axonal" ion="k"/>
                <channelDensity id="axonal_g_pas" ionChannel="pas" condDensity="0.000094 S_per_cm2" erev="-60.216510 mV" segmentGroup="axonal" ion="non_specific"/>
                <channelDensity id="axonal_gImbar_Im" ionChannel="Im" condDensity="0.000999 S_per_cm2" erev="-85.0 mV" segmentGroup="axonal" ion="k"/>
                <channelDensity id="somatic_gK_Tstbar_K_Tst" ionChannel="K_Tst" condDensity="0.092965 S_per_cm2" erev="-85.0 mV" segmentGroup="somatic" ion="k"/>
                <channelDensity id="somatic_gNap_Et2bar_Nap_Et2" ionChannel="Nap_Et2" condDensity="0.000001 S_per_cm2" erev="50.0 mV" segmentGroup="somatic" ion="na"/>
                <channelDensity id="somatic_gSK_E2bar_SK_E2" ionChannel="SK_E2" condDensity="0.019726 S_per_cm2" erev="-85.0 mV" segmentGroup="somatic" ion="k"/>
                <channelDensity id="somatic_gK_Pstbar_K_Pst" ionChannel="K_Pst" condDensity="0.156376 S_per_cm2" erev="-85.0 mV" segmentGroup="somatic" ion="k"/>
                <channelDensity id="somatic_gSKv3_1bar_SKv3_1" ionChannel="SKv3_1" condDensity="0.297559 S_per_cm2" erev="-85.0 mV" segmentGroup="somatic" ion="k"/>
                <channelDensity id="somatic_g_pas" ionChannel="pas" condDensity="0.000091 S_per_cm2" erev="-62.442793 mV" segmentGroup="somatic" ion="non_specific"/>
                <channelDensity id="somatic_gImbar_Im" ionChannel="Im" condDensity="0.000008 S_per_cm2" erev="-85.0 mV" segmentGroup="somatic" ion="k"/>
                <channelDensity id="somatic_gNaTs2_tbar_NaTs2_t" ionChannel="NaTs2_t" condDensity="0.197999 S_per_cm2" erev="50.0 mV" segmentGroup="somatic" ion="na"/>
                <channelDensityNernst id="axonal_gCa_LVAstbar_Ca_LVAst" ionChannel="Ca_LVAst" condDensity="0.000003 S_per_cm2" segmentGroup="axonal" ion="ca"/>
                <channelDensityNernst id="axonal_gCabar_Ca" ionChannel="Ca" condDensity="0.0004 S_per_cm2" segmentGroup="axonal" ion="ca"/>
                <channelDensityNernst id="somatic_gCa_LVAstbar_Ca_LVAst" ionChannel="Ca_LVAst" condDensity="0.001067 S_per_cm2" segmentGroup="somatic" ion="ca"/>
                <channelDensityNernst id="somatic_gCabar_Ca" ionChannel="Ca" condDensity="0.000032 S_per_cm2" segmentGroup="somatic" ion="ca"/>
                <channelDensityNonUniform id="basal_gIhbar_Ih" ionChannel="Ih" erev="-45.0 mV" ion="hcn">
                    <variableParameter parameter="condDensity" segmentGroup="basal">
                        <inhomogeneousValue inhomogeneousParameter="PathLengthOver_basal" value="1e4 * ((-0.869600 + 2.087000*exp((p-0.000000)*0.003000))*0.000052)"/>
                    </variableParameter>
                </channelDensityNonUniform>
                <channelDensityNonUniform id="apical_gIhbar_Ih" ionChannel="Ih" erev="-45.0 mV" ion="hcn">
                    <variableParameter parameter="condDensity" segmentGroup="apical">
                        <inhomogeneousValue inhomogeneousParameter="PathLengthOver_apical" value="1e4 * ((-0.869600 + 2.087000*exp((p-0.000000)*0.003000))*0.000052)"/>
                    </variableParameter>
                </channelDensityNonUniform>
                <spikeThresh value="10mV"/>
                <specificCapacitance value="1.0 uF_per_cm2"/>
                <initMembPotential value="-80 mV"/>
            </membraneProperties>
            <intracellularProperties>
                <species id="ca" concentrationModel="CaDynamics_E2__DLAC_cNAC_1_axonal" ion="ca" initialConcentration="5.0E-11 mol_per_cm3" initialExtConcentration="2.0E-6 mol_per_cm3" segmentGroup="axonal"/>
                <species id="ca" concentrationModel="CaDynamics_E2__DLAC_cNAC_1_somatic" ion="ca" initialConcentration="5.0E-11 mol_per_cm3" initialExtConcentration="2.0E-6 mol_per_cm3" segmentGroup="somatic"/>
                <resistivity value="0.1 kohm_cm"/>
            </intracellularProperties>
        </biophysicalProperties>
    </cell>
    <pulseGenerator id="pg" delay="100ms" duration="2500ms" amplitude="50pA"/>
    <network id="L1_DLAC_cNAC187_1_cell_net">
        <population id="L1_DLAC_cNAC187_1_cellpop" component="L1_DLAC_cNAC187_1_cell_0_0" size="1"/>
        <inputList id="input_list" population="L1_DLAC_cNAC187_1_cellpop" component="pg">
            <input id="0" target="../L1_DLAC_cNAC187_1_cellpop[0]" destination="synapses" segmentId="0"/>
        </inputList>
    </network>
</neuroml>
