<Lems>

    <!--

        This LEMS file has been automatically generated using PyNeuroML v1.3.15 (libNeuroML v0.6.5)

     -->

    <!-- Specify which component to run -->
    <Target component="L1_DLAC_cNAC187_1_cell_step_test"/>

    <!-- Include core NeuroML2 ComponentType definitions -->
    <Include file="Cells.xml"/>
    <Include file="Networks.xml"/>
    <Include file="Simulation.xml"/>

    <Include file="L1_DLAC_cNAC187_1_cell.net.nml"/>
    <Include file="K_Tst.nml"/>
    <Include file="SKv3_1.nml"/>
    <Include file="Nap_Et2.nml"/>
    <Include file="NaTs2_t.nml"/>
    <Include file="Ih.nml"/>
    <Include file="pas.nml"/>
    <Include file="Im.nml"/>
    <Include file="NaTa_t.nml"/>
    <Include file="Ca_LVAst.nml"/>
    <Include file="SK_E2.nml"/>
    <Include file="K_Pst.nml"/>
    <Include file="CaDynamics_E2.nml"/>
    <Include file="Ca.nml"/>

    <Simulation id="L1_DLAC_cNAC187_1_cell_step_test" length="3000.0ms" step="0.01ms" target="L1_DLAC_cNAC187_1_cell_net" seed="12345">  <!-- Note seed: ensures same random numbers used every run -->
        <Display id="DispPop__L1_DLAC_cNAC187_1_cellpop" title="Membrane potentials of cells in L1_DLAC_cNAC187_1_cellpop" timeScale="1ms" xmin="-300.0" xmax="3300.0000000000005" ymin="-90" ymax="50">
            <Line id="L1_DLAC_cNAC187_1_cellpop[0]: v" quantity="L1_DLAC_cNAC187_1_cellpop[0]/v" scale="1mV" color="#d54f33" timeScale="1ms"/>
        </Display>

        <OutputFile id="Volts_file__L1_DLAC_cNAC187_1_cellpop" fileName="L1_DLAC_cNAC187_1_cell_step_test.L1_DLAC_cNAC187_1_cellpop.v.dat">
            <OutputColumn id="v_L1_DLAC_cNAC187_1_cellpop_0__v" quantity="L1_DLAC_cNAC187_1_cellpop[0]/v"/>
        </OutputFile>

        <EventOutputFile id="Spikes_file__L1_DLAC_cNAC187_1_cellpop" fileName="L1_DLAC_cNAC187_1_cell_step_test.L1_DLAC_cNAC187_1_cellpop.spikes" format="ID_TIME">
            <EventSelection id="0" select="L1_DLAC_cNAC187_1_cellpop[0]" eventPort="spike"/>
        </EventOutputFile>

    </Simulation>

</Lems>
