<?xml version="1.0" encoding="UTF-8"?>
<neuroml xmlns="http://www.neuroml.org/schema/neuroml2"
    xmlns:xsi="http://www.w3.org/2001/XMLSchema-instance"
    xsi:schemaLocation="http://www.neuroml.org/schema/neuroml2 https://raw.github.com/NeuroML/NeuroML2/development/Schemas/NeuroML2/NeuroML_v2.3.xsd"
    id = "NeuroML2_file_exported_from_NEURON">

  <notes> NeuroML 2 file generated from ModelView by: NEURON -- VERSION 8.2.6+ HEAD (078a34a9d+) 2024-07-24
          Authors: Michael Hines, Sushil Kambampati and Padraig Gleeson,
          Yale University and UCL
  </notes>

  <cell id="L1_DAC_bNAC219_1_cell_0_0">
    <notes>Cell: L1_DAC_bNAC219_1_cell_0_0 exported from NEURON ModelView</notes>
    <morphology id="morphology">
<!-- Section: L1_DAC_bNAC219_1_cell[0].soma (segmentGroup: soma) which has 21 3D points, so 20 segment(s)-->
      <segment id="0" name = "Seg0_soma">
        <proximal x="-4.84639" y="-10.4911" z="-1.93769" diameter="3.04713"/>
        <distal x="-4.36175" y="-9.442" z="-1.74392" diameter="5.31027"/>
      </segment>
      <segment id="2" name = "Seg1_soma">
        <parent segment="0"/>
        <distal x="-3.87711" y="-8.39289" z="-1.55016" diameter="7.28311"/>
      </segment>
      <segment id="3" name = "Seg2_soma">
        <parent segment="2"/>
        <distal x="-3.39247" y="-7.34378" z="-1.35639" diameter="9.08311"/>
      </segment>
      <segment id="4" name = "Seg3_soma">
        <parent segment="3"/>
        <distal x="-2.90783" y="-6.29466" z="-1.16262" diameter="10.3755"/>
      </segment>
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
<!-- Section: L1_DAC_bNAC219_1_cell[0].soma (segmentGroup: soma) which has 21 3D points, so 20 segment(s)-->

      <segmentGroup id = "soma"  neuroLexId="sao864921383">
         <notes>This group contains an unbranched set of segments, and all of the segmentGroups marked with
             neuroLexId = sao864921383 form a non-overlapping set of all of the segments.
             These segmentGroups correspond to the 'cables' of NeuroML v1.8.1, and map to/from NEURON sections.</notes>
        <member segment = "0"/>
        <member segment = "2"/>
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      </segmentGroup>

<!-- Section: L1_DAC_bNAC219_1_cell[0].dend_63 (segmentGroup: dend_63) which has 10 3D points, so 9 segment(s)-->

      <segmentGroup id = "dend_63"  neuroLexId="sao864921383">
         <notes>This group contains an unbranched set of segments, and all of the segmentGroups marked with
             neuroLexId = sao864921383 form a non-overlapping set of all of the segments.
             These segmentGroups correspond to the 'cables' of NeuroML v1.8.1, and map to/from NEURON sections.</notes>
        <member segment = "2659"/>
        <member segment = "2660"/>
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      </segmentGroup>

<!-- Section: L1_DAC_bNAC219_1_cell[0].dend_44 (segmentGroup: dend_44) which has 4 3D points, so 3 segment(s)-->

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
    </morphology>
  </cell>

  <network id="network" type="networkWithTemperature" temperature="6 degC">
    <population id="Pop_L1_DAC_bNAC219_1_cell_0_0" component="L1_DAC_bNAC219_1_cell_0_0" size="1" type="populationList">
        <instance id="0">
            <location x="0" y="0" z="0"/>
        </instance>
    </population>
  </network>

</neuroml>
